// SBML level 2 version 3

function atan2(ya, xa)
  piecewise(atan(ya/xa), xa > 0, atan(ya/xa) + pi, (xa < 0) && (ya >= 0), atan(ya/xa) - pi, (xa < 0) && (ya < 0), pi/2, (xa == 0) && (ya > 0), 0 - pi/2, (xa == 0) && (ya < 0), 0);
end

function fmod(num, div)
  piecewise(NaN, div == 0, 0 - (abs(num) - abs(div)*floor(abs(num)/abs(div))), num < 0, num - abs(div)*floor(num/abs(div)));
end

model McSharry2003_Synthetic_ECG()
  // This a model from the article:
  // A dynamical model for generating synthetic electrocardiogram signals
  // Patrick E. McSharry, Gari Clifford, Lionel Tarassenko, and Leonard A. Smith IEEE Transactions on Biomedical Engineering 2003 Mar;50(3):289-294; 2578676 ,
  // Abstract:
  // A dynamical model based on three coupled ordinary differential equations is introduced which is capable of generating realistic synthetic electrocardiogram (ECG) signals. The operator can specify the mean and standard deviation of the heart rate, the morphology of the PQRST cycle and the power spectrum of the RR tachogram. In particular, both Respiratory Sinus Arrhythmia at the high frequencies (HF) and Mayer waves at the low frequencies (LF) together with the LF/HF ratio are incorporated in the model. Much of the beat-to-beat variation in morphology and timing of the human ECG, including QT dispersion and R-peak amplitude modulation are shown to result. This model may be employed to assess biomedical signal processing techniques which are used to compute clinical statistics from the ECG.
  // This model has been manually implemented in SBML based on the open-source ECGSYN C source code from PhysioNET
  // The original model code retrieved from: ECGSYN Source Repository
  // Conversion to SBML completed by:
  // Sivek, Ryan T.
  // rsivek@mitre.org
  // The MITRE Corporation
  // in support of the Synthea project

  // Compartments:
  compartment COMpartment = 1 litre;

  // Parameters:
  r0 = 1;
  x0 = 0;
  y0 = 0;
  z0 = 0;
  x = 1;
  y = 0;
  z = 0.04;
  fresp = 0.25;
  hrmean = 60;
  hrfact = sqrt(hrmean/60);
  hrfact2 = sqrt(hrfact);
  rrpc = 60/hrmean;
  ti_P = -90;
  ti_Q = -15;
  ti_R = 0;
  ti_S = 15;
  ti_T = 130;
  ai_P = 0.75;
  ai_Q = -5;
  ai_R = 30;
  ai_S = -7.5;
  ai_T = 0.75;
  bi_P = 0.25;
  bi_Q = 0.1;
  bi_R = 0.1;
  bi_S = 0.1;
  bi_T = 0.4;
  ti_f_P = pi/180*ti_P*hrfact2;
  ti_f_Q = pi/180*ti_Q*hrfact;
  ti_f_R = pi/180*ti_R;
  ti_f_S = pi/180*ti_S*hrfact;
  ti_f_T = pi/180*ti_T*hrfact2;
  bi_f_P = hrfact*bi_P;
  bi_f_Q = hrfact*bi_Q;
  bi_f_R = hrfact*bi_R;
  bi_f_S = hrfact*bi_S;
  bi_f_T = hrfact*bi_T;

  // Assignment rules:
  w0 := 2*pi/rrpc;
  a0 := 1 - sqrt(x^2 + y^2)/r0;
  zbase := 0.005*sin(2*pi*fresp*time);
  ta := atan2(y, x);
  dt_P := fmod(ta - ti_f_P, 2*pi);
  dt_Q := fmod(ta - ti_f_Q, 2*pi);
  dt_R := fmod(ta - ti_f_R, 2*pi);
  dt_S := fmod(ta - ti_f_S, 2*pi);
  dt_T := fmod(ta - ti_f_T, 2*pi);
  dz_P := ai_P*dt_P*exp(-0.5*(dt_P/bi_f_P)^2);
  dz_Q := ai_Q*dt_Q*exp(-0.5*(dt_Q/bi_f_Q)^2);
  dz_R := ai_R*dt_R*exp(-0.5*(dt_R/bi_f_R)^2);
  dz_S := ai_S*dt_S*exp(-0.5*(dt_S/bi_f_S)^2);
  dz_T := ai_T*dt_T*exp(-0.5*(dt_T/bi_f_T)^2);
  dx_ := a0*x - w0*y;
  dy_ := a0*y + w0*x;
  dz_ := minus(0, dz_P + dz_Q + dz_R + dz_S + dz_T, z - zbase);

  // Rate rules:
  x' = a0*x - w0*y;
  y' = a0*y + w0*x;
  z' = minus(0, dz_P + dz_Q + dz_R + dz_S + dz_T, z - zbase);

  // Unit definitions:
  unit Hz = 1 / second;
  unit bpm = 1 / (60 second);
  unit mV = 1e-3 volt;
  unit rad_per_sec = radian / second; rad_per_sec is "mV";
end
