// SBML level 2 version 4

model MODEL1304190000()
  // Brännmark2013_Insulin_Signalling_normal
  // Brännmark2013 - Insulin signalling in human adipocytes (normal condition)
  // The paper describes insulin signalling in human adipocytes under normal and diabetic states using mathematical models based on experimental data. This model corresponds to insulin signalling under normal condtion
  // This model is described in the article:
  // Insulin Signaling in Type 2 Diabetes: EXPERIMENTAL AND MODELING ANALYSES REVEAL MECHANISMS OF INSULIN RESISTANCE IN HUMAN ADIPOCYTES.
  // Brännmark C, Nyman E, Fagerholm S, Bergenholm L, Ekstrand EM, Cedersund G, Strålfors P.
  // J Biol Chem. 2013 Apr 5;288(14):9867-80.
  // Abstract:
  // Type 2 diabetes originates in an expanding adipose tissue that for unknown reasons becomes insulin resistant. Insulin resistance reflects impairments in insulin signaling, but mechanisms involved are unclear because current research is fragmented. We report a systems level mechanistic understanding of insulin resistance, using systems wide and internally consistent data from human adipocytes. Based on quantitative steady-state and dynamic time course data on signaling intermediaries, normally and in diabetes, we developed a dynamic mathematical model of insulin signaling. The model structure and parameters are identical in the normal and diabetic states of the model, except for three parameters that change in diabetes: (i) reduced concentration of insulin receptor, (ii) reduced concentration of insulin-regulated glucose transporter GLUT4, and (iii) changed feedback from mammalian target of rapamycin in complex with raptor (mTORC1). Modeling reveals that at the core of insulin resistance in human adipocytes is attenuation of a positive feedback from mTORC1 to the insulin receptor substrate-1, which explains reduced sensitivity and signal strength throughout the signaling network. Model simulations with inhibition of mTORC1 are comparable with experimental data on inhibition of mTORC1 using rapamycin in human adipocytes. We demonstrate the potential of the model for identification of drug targets, e.g. increasing the feedback restores insulin signaling, both at the cellular level and, using a multilevel model, at the whole body level. Our findings suggest that insulin resistance in an expanded adipose tissue results from cell growth restriction to prevent cell necrosis.
  // This model is hosted on BioModels Database and identified by: MODEL1304190000 .
  // To cite BioModels Database, please use: BioModels Database: An enhanced, curated and annotated resource for published quantitative kinetic models .
  // To the extent possible under law, all copyright and related or neighbouring rights to this encoded model have been dedicated to the public domain worldwide. Please refer to CC0 Public Domain Dedication for more information.
  // biomodels.db:MODEL1304190000
  // biomodels.db:BIOMD0000000448
  // isDescribedBy pubmed:23400783
  // isDerivedFrom biomodels.db:BIOMD0000000343
  // hasTaxon taxonomy:9606
  // isVersionOf GO:0032869

  // Compartments:
  compartment cellvolume = 1;  // GO:0005623

  // Species:
  species IR in cellvolume = 99.87371;  // isVersionOf uniprot:P06213
  species IRp in cellvolume = 0.001862532;  // isVersionOf uniprot:P06213 kegg.compound:C00562
  species IRins in cellvolume = 0;  // hasPart uniprot:P06213 uniprot:P01308
  species IRip in cellvolume = 0.01884305;  // isVersionOf uniprot:P06213 kegg.compound:C00562
  species IRi in cellvolume = 0.1055839;  // isVersionOf uniprot:P06213
  species IRS1 in cellvolume = 82.9672;  // isVersionOf uniprot:P35568
  species IRS1p in cellvolume = 0.001194818;  // isVersionOf uniprot:P35568 kegg.compound:C00562
  species IRS1p307 in cellvolume = 0.3274544;  // isVersionOf uniprot:P35568 kegg.compound:C00562 MOD:00046
  species IRS1307 in cellvolume = 16.70415;  // isVersionOf uniprot:P35568
  species X in cellvolume = 99.99833;  // isVersionOf CHEBI:36080 FMA:74531
  species Xp in cellvolume = 0.001666341;  // isVersionOf kegg.compound:C00562 FMA:74531
  species PKB in cellvolume = 68.18066;  // isVersionOf uniprot:P31751
  species PKB308p in cellvolume = 13.29648;  // isVersionOf uniprot:P31751 kegg.compound:C00562
  species PKB473p in cellvolume = 16.81719;  // isVersionOf uniprot:P31751 kegg.compound:C00562
  species PKB308p473p in cellvolume = 1.705661;  // isVersionOf uniprot:P31751 kegg.compound:C00562
  species mTORC1 in cellvolume = 86.50025;  // hasPart uniprot:P42345 uniprot:Q8N122
  species mTORC1a in cellvolume = 13.49975;  // hasPart uniprot:P42345 uniprot:Q8N122
  species mTORC2 in cellvolume = 99.84781;  // hasPart uniprot:P42345 uniprot:Q6R327
  species mTORC2a in cellvolume = 0.1521852;  // hasPart uniprot:P42345 uniprot:Q6R327
  species AS160 in cellvolume = 83.8141;  // isVersionOf uniprot:O60343
  species AS160p in cellvolume = 16.1859;  // isVersionOf uniprot:O60343; hasProperty PATO:0002220
  species GLUT4m in cellvolume = 26.52388;  // isVersionOf uniprot:P14672; occursIn GO:0005886
  species GLUT4 in cellvolume = 73.47612;  // isVersionOf uniprot:P14672
  species S6K in cellvolume = 99.2732;  // isVersionOf uniprot:P23443
  species S6Kp in cellvolume = 0.7268013;  // isVersionOf uniprot:P23443 kegg.compound:C00562
  species S6 in cellvolume = 92.75964;  // isVersionOf uniprot:P62753
  species S6p in cellvolume = 7.240358;  // isVersionOf uniprot:P62753 kegg.compound:C00562

  // Parameters:
  diabetes = 1;
  k1a = 0.6331;
  k1basal = 0.03683;
  k1c = 0.8768;
  k1d = 31.01;
  k1f = 1840;
  k1g = 1944;
  k1r = 0.5471;
  k2a = 3.227;
  k2c = 5759;
  k2basal = 0.04228;
  k2b = 3424;
  k2d = 280.8;
  k2f = 2.913;
  k2g = 0.2671;
  k3a = 0.001377;
  k3b = 0.09876;
  k4a = 5790;
  k4b = 34.8;
  k4c = 4.456;
  k4e = 42.84;
  k4f = 143.6;
  k4h = 0.5361;
  k5a1 = 1.842;
  k5a2 = 0.05506;
  k5b = 24.83;
  k5d = 1.06;
  km5 = 2.65;
  k5c = 0.08575;
  k6f1 = 2.652;
  k6f2 = 36.93;
  km6 = 30.54;
  n6 = 2.137;
  k6b = 65.18;
  k7f = 50.98;
  k7b = 2286;
  k8 = 724.2;
  glut1 = 7042;
  k9f1 = 0.1298;
  k9b1 = 0.04441;
  k9f2 = 3.329;
  k9b2 = 31;
  km9 = 5873;
  n9 = 0.9855;
  scaleIR = 5.2022;
  scaleIRS1 = 0.37615;
  scaleIRS1ds = 14.892;
  scaleIRS1307 = 0.058663;
  scalePKB308 = 0.043564;
  scalePKB473 = 0.012996;
  scaleAS160 = 0.026656;
  scaleGLUCOSE = 0.040513;
  scaleS6K = 0.74654;
  scaleS6 = 0.11494;
  gluc = 0.05;
  insulin = 10;

  // Assignment rules:
  measuredIRp := scaleIR*(IRp + IRip);
  measuredIRint := IRi + IRip;
  measuredIRS1p := scaleIRS1*(IRS1p + IRS1p307);
  measuredIRS1307 := scaleIRS1307*(IRS1p307 + IRS1307);
  measuredPKB308p := scalePKB308*(PKB308p + PKB308p473p);
  measuredPKB473p := scalePKB473*(PKB473p + PKB308p473p);
  measuredAS160p := scaleAS160*AS160p;
  measuredmTORC1a := mTORC1a;
  measuredS6Kp := scaleS6K*S6Kp;
  measuredS6p := scaleS6*S6p;
  measuredmTORC2a := mTORC2a;
  glucoseuptake := k8*GLUT4m*gluc + glut1*gluc;

  // Reactions:
  v1a: IR => IRins; IR*k1a*insulin;
  v1basal: IR => IRp; k1basal*IR;
  v1c: IRins => IRp; IRins*k1c;
  v1d: IRp => IRip; IRp*k1d;
  v1e: IRip => IRi; IRip*k1f*Xp;  // modifiers: Xp
  v1g: IRp => IR; IRp*k1g;
  v1r: IRi => IR; IRi*k1r;
  v2a: IRS1 => IRS1p; IRS1*k2a*IRip;  // modifiers: IRip
  v2b: IRS1p => IRS1; IRS1p*k2b;
  v2c: IRS1p => IRS1p307; IRS1p*k2c*mTORC1a*diabetes;  // modifiers: mTORC1a
  v2d: IRS1p307 => IRS1p; IRS1p307*k2d;
  v2f: IRS1p307 => IRS1307; IRS1p307*k2f;
  v2basal: IRS1 => IRS1307; IRS1*k2basal;
  v2g: IRS1307 => IRS1; IRS1307*k2g;
  v3a: X => Xp; X*k3a*IRS1p;  // modifiers: IRS1p
  v3b: Xp => X; Xp*k3b;
  v5a: mTORC1 => mTORC1a; mTORC1*(k5a1*PKB308p473p + k5a2*PKB308p);  // modifiers: PKB308p, PKB308p473p
  v5b: mTORC1a => mTORC1; mTORC1a*k5b;
  v5c: mTORC2 => mTORC2a; mTORC2*k5c*IRip;  // modifiers: IRip
  v5d: mTORC2a => mTORC2; k5d*mTORC2a;
  v4a: PKB => PKB308p; k4a*PKB*IRS1p;  // modifiers: IRS1p
  v4b: PKB308p => PKB; k4b*PKB308p;
  v4c: PKB308p => PKB308p473p; k4c*PKB308p*mTORC2a;  // modifiers: mTORC2a
  v4e: PKB473p => PKB308p473p; k4e*PKB473p*IRS1p307;  // modifiers: IRS1p307
  v4f: PKB308p473p => PKB473p; k4f*PKB308p473p;
  v4h: PKB473p => PKB; k4h*PKB473p;
  v6f1: AS160 => AS160p; AS160*(k6f1*PKB308p473p + k6f2*PKB473p^n6/(km6^n6 + PKB473p^n6));  // modifiers: PKB308p473p, PKB473p
  v6b1: AS160p => AS160; AS160p*k6b;
  v7f: GLUT4 => GLUT4m; GLUT4*k7f*AS160p;  // modifiers: AS160p
  v7b: GLUT4m => GLUT4; GLUT4m*k7b;
  v9f1: S6K => S6Kp; S6K*k9f1*mTORC1a^n9/(km9^n9 + mTORC1a^n9);  // modifiers: mTORC1a
  v9b1: S6Kp => S6K; S6Kp*k9b1;
  v9f2: S6 => S6p; S6*k9f2*S6Kp;  // modifiers: S6Kp
  v9b2: S6p => S6; S6p*k9b2;
end
