// SBML level 3 version 1

model MDD_Model()
  // Major Depressive Disorder Model

  // Compartments:
  compartment CNS; CNS is "Central Nervous System";
  compartment HPA_Axis; HPA_Axis is "Hypothalamic-Pituitary-Adrenal Axis";

  // Species:
  species Cortisol in HPA_Axis = 1/HPA_Axis;
  species HPA_Hormone_Glands in HPA_Axis = 1/HPA_Axis;
  species Neurotransmitters in CNS = 1/CNS;
  species Stress_Indicators in CNS = 1/CNS;

  // Reactions:
  Adrenal_Gland_Activity: A + x2 -> A; a5*A*(x2 - 1);
  Pituitary_Gland_Activity: P + x1_tot -> P; a6*P*(x1_tot - 1);
  Hippocampal_Activity: h + x3 -> h; a7*(1/step_function(x3, T)) - h;
  CRH_Internal_Dynamics: x1_internal + u_t + h + x3 -> x1_internal; a1*(u_t/(h*MR_function*x3*GR_function*x3)) - x1_internal;
  CRH_External_Dynamics: x1_external + x1_dose -> x1_external; -(a1_ext*(x1_dose - x1_external));
  CRH_to_ACTH_Dynamics: x2 + x1_tot + P + x3 -> x2; a2*divide(x1_tot*P, GR_function, x3) - x2;
  ACTH_to_Cortisol_Dynamics: x3 + x2 + A -> x3; a3*x2*A - x3;
end
