// SBML level 2 version 4

function comb_2dn_order_MA(S1, S2, k, Tot)
  S1*k*S2*Tot;
end

model MODEL1412200000()
  // Talemi2015 - Persistent telomere-associated DNA damage foci (TAF), a measure to predict cancer risks
  // A Robust Model of DNA Damage Dynamics.
  // Rasgou Talemi and Schaber, 12.20.2014.
  // biomodels.db:MODEL1412200000

  // Compartments:
  compartment compartment = 1;

  // Species:
  species $TAF in compartment = TAF0;
  species FAST in compartment = 0;
  species FASTi in compartment = 0;
  species SLOWi in compartment = 0;
  species SLOW in compartment = 0;
  species RP in compartment = 20;

  // Parameters:
  Gy = 20;
  FociperGy = 167.8169;
  prop_C = 0.02256591;
  TAF0 = 0.8898832;
  k_TAF = 0.7905018;
  BaseDNAdamage = 0.9891911;
  kcross = 0.0001518447;
  Initial_for_TAF = TAF;
  Initial_for_FociperGy = FociperGy;
  Initial_for_Gy = Gy;

  // Assignment rules:
  Tot := BaseDNAdamage + FAST + FASTi + SLOW + SLOWi + TAF;
  DNAdamagefoci_0 := sqrt(Initial_for_Gy)*Initial_for_FociperGy;
  percentTAF := 100*TAF/Tot;
  TotalRP := FAST + RP + SLOW;
  Toti := FASTi + SLOWi;

  // Reactions:
  rf: FAST => RP; compartment*rf_k1*FAST;
    rf_k1 = 2000;
  rs: SLOW => RP; compartment*rs_k1*SLOW;
    rs_k1 = 0.00511497;
  v1: FASTi + RP => FAST; compartment*v1_k1*FASTi*RP;
    v1_k1 = 0.00535262;
  v3: SLOWi + RP => SLOW; compartment*v3_k1*SLOWi*RP;
    v3_k1 = 0.000467362;
  vcross1: FASTi + RP => FAST; compartment*comb_2dn_order_MA(FASTi, RP, kcross, Toti);
  vcross2: SLOWi + RP => SLOW; compartment*comb_2dn_order_MA(SLOWi, RP, kcross, Toti);

  // Events:
  DNAdamage: at (time > 0): TAF = Initial_for_TAF + k_TAF*sqrt(Gy), SLOWi = prop_C*DNAdamagefoci_0, FASTi = (1 - prop_C)*DNAdamagefoci_0;

  // Unit definitions:
  unit volume = dimensionless;
  unit time = 3600 second;
  unit substance = item;
end
