// SBML level 3 version 1

function step_function(x, T, a, b)
  piecewise(a + b, x >= T, a);
end

function MR_function(a)
  a;
end

function GR_function(a, kGR)
  (a/kGR)^3 + 1;
end

model Major_Depressive_Disorder_Model()

  // Compartments:
  compartment CNS; CNS is "Central Nervous System";
  compartment HPA_Axis; HPA_Axis is "Hypothalamic-Pituitary-Adrenal Axis";

  // Species:
  species $Cortisol in HPA_Axis = 1/HPA_Axis;
  species $HPA_Hormone_Glands in HPA_Axis = 1/HPA_Axis;
  species $Neurotransmitters in CNS = 1/CNS;
  species $Stress_Indicators in CNS = 1/CNS;
  species $A in CNS = 1/CNS;
  species $P in CNS = 1/CNS;
  species $x2 in CNS = 1/CNS;
  species $x3 in CNS = 1/CNS;
  species $h in CNS = 1/CNS;
  species $D_t in CNS = 1/CNS;
  species $u_t in CNS = 1/CNS;
  species $x1_tot in CNS = 1/CNS;
  species $x1_internal in CNS = 1/CNS;
  species $x1_external in CNS = 1/CNS;
  species $x1_dose in CNS = 1/CNS;
  species $dA_dt in CNS = 1/CNS;
  species $dP_dt in CNS = 1/CNS;
  species $dh_dt in CNS;
  species $dx1_internal_dt in CNS = 1/CNS;
  species $dx2_dt in CNS = 1/CNS;
  species $dx3_dt in CNS = 1/CNS;
  species $a in CNS = 1/CNS;
  species $b in CNS = 3/CNS;
  species $T in CNS = 1.5/CNS;
  species $kGR in CNS = 4/CNS;

  // Parameters:
  a1_ext = 23.04;
  a1 = 244.8;
  a2 = 50.4;
  a3 = 12.384;
  a5 = 0.099;
  a6 = 0.099;
  a7 = 0.04761905;

  // Assignment rules:
  dh_dt := dh_dt;

  // Reactions:
  Adrenal_Gland_Activity: $A + $x2 => $dA_dt; a5*A*(x2 - 1);
  Pituitary_Gland_Activity: $P + $x1_tot => $dP_dt; a6*P*(x1_tot - 1);
  Hippocampal_Activity: $T + $D_t + $h + $x3 + $a + $b => $dh_dt; a7*(1/step_function(x3, T, a, b)) - h;
  CRH_Internal_Dynamics: $x1_internal + $u_t + $h + $x3 + $a + $kGR => $dx1_internal_dt; a1*(u_t/(h*MR_function(a)*x3*GR_function(a, kGR)*x3)) - x1_internal;
  CRH_External_Dynamics: $u_t + $x3 + $x1_external + $x1_dose => $dx1_internal_dt; -(a1_ext*(x1_dose - x1_external));
  CRH_to_ACTH_Dynamics: $x2 + $x1_tot + $P + $x3 + $a + $kGR => $dx2_dt; a2*(x1_tot*P/GR_function(x3, kGR)) - x2;
  ACTH_to_Cortisol_Dynamics: $x3 + $x2 + $A => $dx3_dt; a3*x2*A - x3;
end
