// SBML level 2 version 4

function rng(seed, time)
  abs(sin(exp((time + seed + 3)^2)));
end

model Smith2004_CVS_human()
  // This a model from the article:
  // Minimal haemodynamic system model including ventricular interaction and valve dynamics.
  // Smith BW, Chase JG, Nokes RI, Shaw GM, Wake G. Med Eng Phys 2004 Mar;26(2):131-9 15036180 ,
  // Abstract:
  // Characterising circulatory dysfunction and choosing a suitable treatment is often difficult and time consuming, and can result in a deterioration in patient condition, or unsuitable therapy choices. A stable minimal model of the human cardiovascular system (CVS) is developed with the ultimate specific aim of assisting medical staff for rapid, on site modelling to assist in diagnosis and treatment. Models found in the literature simulate specific areas of the CVS with limited direct usefulness to medical staff. Others model the full CVS as a closed loop system, but they were found to be very complex, difficult to solve, or unstable. This paper develops a model that uses a minimal number of governing equations with the primary goal of accurately capturing trends in the CVS dynamics in a simple, easily solved, robust model. The model is shown to have long term stability and consistency with non-specific initial conditions as a result. An "open on pressure close on flow" valve law is created to capture the effects of inertia and the resulting dynamics of blood flow through the cardiac valves. An accurate, stable solution is performed using a method that varies the number of states in the model depending on the specific phase of the cardiac cycle, better matching the real physiological conditions. Examples of results include a 9% drop in cardiac output when increasing the thoracic pressure from -4 to 0 mmHg, and an increase in blood pressure from 120/80 to 165/130 mmHg when the systemic resistance is doubled. These results show that the model adequately provides appropriate magnitudes and trends that are in agreement with existing data for a variety of physiologically verified test cases simulating human CVS function.
  // This model was taken from the CellML repository and automatically converted to SBML.
  // The original model was: Smith BW, Chase JG, Nokes RI, Shaw GM, Wake G. (2004) - version=1.0
  // The original CellML model was created by:
  // Geoffrey Nunns
  // gnunns1@jhu.edu
  // The University of Auckland
  // This model originates from BioModels Database: A Database of Annotated Published Models. It is copyright (c) 2005-2011 The BioModels.net Team.
  // To the extent possible under law, all copyright and related or neighbouring rights to this encoded model have been dedicated to the public domain worldwide. Please refer to CC0 Public Domain Dedication for more information.
  // In summary, you are entitled to use this encoded model in absolutely any manner you deem suitable, verbatim, or with modification, alone or embedded it in a larger context, redistribute it, commercially or not, in a restricted way or not..
  // To cite BioModels Database, please use: Li C, Donizelli M, Rodriguez N, Dharuri H, Endler L, Chelliah V, Li L, He E, Henry A, Stefan MI, Snoep JL, Hucka M, Le Novère N, Laibe C (2010) BioModels Database: An enhanced, curated and annotated resource for published quantitative kinetic models. BMC Syst Biol., 4:92.
  // biomodels.db:MODEL1006230000
  // isDescribedBy pubmed:15036180
  // hasTaxon taxonomy:9606
  // isVersionOf GO:0003013

  // Compartments:
  compartment COMpartment = 1 litre;

  // Parameters:
  R_mt = 0.0158;
  R_av = 0.018;
  R_tc = 0.0237;
  R_pv = 0.0055;
  R_pul = 0.1552;
  R_sys = 1.1889;
  L_tc = 8.0093e-5;
  L_pv = 0.00014868;
  L_mt = 7.6968e-5;
  L_av = 0.00012189;
  V_tot = 5.5;
  P_th = -4;
  A = 1;
  B = 80;
  C = 0.27;
  rng_seed = 0;
  e_variance = 0.1;
  arr_tau_0 = 0.75;
  arr_tau_1 = 1;
  e_delay = 0;
  vfib_start = 0;
  vfib_end = 0;
  period = 1;
  P_0_pcd = 0.5003;
  V_0_pcd = 200;
  lambda_pcd = 0.03;
  V_lv = 94.6812;
  E_es_lvf = 2.8798;
  V_d_lvf = 0;
  P_0_lvf = 0.1203;
  lambda_lvf = 0.033;
  V_0_lvf = 0;
  V_rv = 90.7302;
  E_es_rvf = 0.585;
  V_d_rvf = 0;
  P_0_rvf = 0.2157;
  lambda_rvf = 0.023;
  V_0_rvf = 0;
  V_spt = ;
  E_es_spt = 48.754;
  V_d_spt = 2;
  P_0_spt = 1.1101;
  lambda_spt = 0.435;
  V_0_spt = 2;
  one = 1;
  E_es_pa = 0.369;
  V_pa = 43.0123;
  V_d_pa = 0;
  E_es_pu = 0.0073;
  V_pu = 808.4579;
  V_d_pu = 0;
  E_es_ao = 0.8413;
  V_ao = 133.3381;
  V_d_ao = 0;
  E_es_vc = 0.0059;
  V_vc = 329.7803;
  V_d_vc = 0;
  Q_mt = 245.5813;
  Q_av = 0;
  Q_tc = 190.0661;
  Q_pv = 0;

  // Assignment rules:
  e_delay_rate := piecewise(rng(rng_seed, time)*e_variance*0.9, (tau >= arr_tau_0) && (tau < arr_tau_1), e_delay_rate);
  tau := piecewise(0, time - e_delay <= 0, 0.5 - 1/pi*atan(cot(pi*(time - e_delay)/period)));
  e_t := piecewise(0.1 + 0.45*(1 + sin(6*tau*pi)), (time >= vfib_start) && (time < vfib_end), A*exp(-(B/period^2)*(tau - C*period)^2));
  V_pcd := V_lv + V_rv;
  P_pcd := P_0_pcd*(exp(lambda_pcd*(V_pcd - V_0_pcd)) - 1);
  P_peri := P_pcd + P_th;
  V_lvf := V_lv - V_spt;
  P_lvf := e_t*P_es_lvf + (1 - e_t)*P_ed_lvf;
  P_lv := P_lvf + P_peri;
  P_es_lvf := E_es_lvf*(V_lvf - V_d_lvf);
  P_ed_lvf := P_0_lvf*(exp(lambda_lvf*(V_lvf - V_0_lvf)) - 1);
  V_rvf := V_rv + V_spt;
  P_rvf := e_t*P_es_rvf + (1 - e_t)*P_ed_rvf;
  P_rv := P_rvf + P_peri;
  P_es_rvf := E_es_rvf*(V_rvf - V_d_rvf);
  P_ed_rvf := P_0_rvf*(exp(lambda_rvf*(V_rvf - V_0_rvf)) - 1);
  P_pa := E_es_pa*(V_pa - V_d_pa) + P_th;
  P_pu := E_es_pu*(V_pu - V_d_pu) + P_th;
  P_ao := E_es_ao*(V_ao - V_d_ao);
  P_vc := E_es_vc*(V_vc - V_d_vc);
  Q_sys := (P_ao - P_vc)/R_sys;
  Q_pul := (P_pa - P_pu)/R_pul;
  t_prev := time;

  // Rate rules:
  V_lv' = piecewise(0, (Q_mt < 0) && (Q_av < 0), -Q_av, Q_mt < 0, Q_mt, Q_av < 0, Q_mt - Q_av);
  V_rv' = piecewise(0, (Q_tc < 0) && (Q_pv < 0), -Q_pv, Q_tc < 0, Q_tc, Q_pv < 0, Q_tc - Q_pv);
  V_pa' = piecewise(-Q_pul, Q_pv < 0, Q_pv - Q_pul);
  V_pu' = piecewise(Q_pul, Q_mt < 0, Q_pul - Q_mt);
  V_ao' = piecewise(-Q_sys, Q_av < 0, Q_av - Q_sys);
  V_vc' = piecewise(Q_sys, Q_tc < 0, Q_sys - Q_tc);
  Q_mt' = piecewise(0, (P_pu - P_lv < 0) && (Q_mt < 0), (P_pu - P_lv - Q_mt*R_mt)/L_mt);
  Q_av' = piecewise(0, (P_lv - P_ao < 0) && (Q_av < 0), (P_lv - P_ao - Q_av*R_av)/L_av);
  Q_tc' = piecewise(0, (P_vc - P_rv < 0) && (Q_tc < 0), (P_vc - P_rv - Q_tc*R_tc)/L_tc);
  Q_pv' = piecewise(0, (P_rv - P_pa < 0) && (Q_pv < 0), (P_rv - P_pa - Q_pv*R_pv)/L_pv);
  e_delay' = piecewise(0, (tau >= arr_tau_0) && (tau < arr_tau_1), e_delay_rate);

  // Unit definitions:
  unit kPa = 1000 pascal;
  unit mL = 1e-3 litre;
  unit per_mL = 1 / (1e-3 litre);
  unit kPa_per_mL = 1000 pascal / (1e-3 litre);
  unit kPa_second_per_mL = 1000 pascal * second / (1e-3 litre);
  unit mL_per_second = 1e-3 litre / second;
  unit mL_per_second2 = 1e-3 litre / second^2;
  unit per_second2 = 1 / second^2;
  unit kPa_second2_per_mL = 1000 pascal * second^2 / (1e-3 litre);
end
